OpenVSP model (file version 5), 38 components.
Geometry view with OpenVSP parameter names; values to 6 digits, angles in degrees, lengths in the model's unit.
Overall bounding box: X_Min=-0.0198269 X_Len=22.8813 Y_Min=-16.2656 Y_Len=32.5313 Z_Min=-1.335 Z_Len=6.874

Wing "Vertical Stab"
  location (X Y Z) 17.9961 0 1.08696, rotation 90 0 0
  symmetric about XZ
  bounding box size 4.86541 0.361729 4.45204
  mass: Density=0 Shell_Flag=1 Mass_Area=15.04 Mass_Prior=0
  totals: TotalSpan=8.90408 TotalProjectedSpan=8.90408 TotalChord=2.90277 TotalArea=25.8465 TotalAR=3.06744
  root: chord 3.61519, twist 0, NACA 4-series Camber=0 CamberLoc=0.2 ThickChord=0.1
  sections:
    n  Span     Root_Chord  Tip_Chord  Area     Sweep  Sweep_Location  Dihedral  Twist  Twist_Location  tip airfoil
    1  4.45204  3.61519     2.19035    12.9233  31     0               0         0      0.25            as above

Wing "Horizontal Stab"
  location (X Y Z) 20.7 0 5, rotation 0 0 0
  symmetric about XZ
  bounding box size 2 7.86207 0.240109
  mass: Density=0 Shell_Flag=1 Mass_Area=15.04 Mass_Prior=0
  totals: TotalSpan=7.86207 TotalProjectedSpan=7.86207 TotalChord=1.56897 TotalArea=12.3353 TotalAR=5.01099
  root: chord 2, twist 0, NACA 4-series Camber=0 CamberLoc=0.2 ThickChord=0.12
  sections:
    n  Span     Root_Chord  Tip_Chord  Area     Sweep  Sweep_Location  Dihedral  Twist  Twist_Location  tip airfoil
    1  3.93104  2           1.13793    6.16766  11.5   0               0         0      0.25            NACA 4-series Camber=0 CamberLoc=0.2 ThickChord=0.1

Fuselage "FuselageGeom"
  location (X Y Z) 0 0 0, rotation 0 0 0
  bounding box size 22.8419 2.77 2.71434
  mass: Density=0 Shell_Flag=1 Mass_Area=72 Mass_Prior=0
  Design: Length=22.67
  cross sections:
    n  XLocPercent  YLocPercent  ZLocPercent  shape
    0  0            0            -0.0225      ellipse Ellipse_Height=0.15 Ellipse_Width=0.2
    1  0.05         0            -0.018       ellipse Ellipse_Height=1.6 Ellipse_Width=2.17
    2  0.11936      0            0            ellipse Ellipse_Height=2.52492 Ellipse_Width=2.77
    3  0.375        0            0            general fuselage BotStr=0.83 BotTanAngle=90 CornerRad=0.00581395 Height=2.67 LowStr=0.83 MaxWidthLoc=-0.348837 TopStr=0.83 TopTanAngle=85 UpStr=0.83 Width=2.77
    4  0.5          0            0            as above
    5  0.649306     0            0.0035       general fuselage BotStr=0.83 BotTanAngle=90 CornerRad=0.00581395 Height=2.6 LowStr=0.83 MaxWidthLoc=-0.348837 TopStr=0.83 TopTanAngle=85 UpStr=0.83 Width=2.77
    6  0.771074     0            0.0138889    general fuselage BotStr=0.83 BotTanAngle=90 CornerRad=0 Height=2 LowStr=0.83 MaxWidthLoc=-0.2326 TopStr=0.83 TopTanAngle=90 UpStr=0.83 Width=2.67
    7  0.903025     0            0.0325       ellipse Ellipse_Height=1 Ellipse_Width=2.27
    8  1            0            0.04         ellipse Ellipse_Height=0.35 Ellipse_Width=0.87

Wing "Wings", child of "FuselageGeom"
  location (X Y Z) 9.1 -3.51169e-07 1.18992, rotation 0 0 0; relative location 9.1 -0.1 1.7, rotation 0 0 0
  symmetric about XZ
  bounding box size 2.46099 30 0.446699
  mass: Density=1 Shell_Flag=1 Mass_Area=50.68 Mass_Prior=0
  totals: TotalSpan=30 TotalProjectedSpan=30 TotalChord=2.22 TotalArea=66.6 TotalAR=13.5135
  root: chord 2.452, twist 0, NACA 5-digit CamberLoc=0.15 IdealCl=0.53 ThickChord=0.18
  sections:
    n  Span  Root_Chord  Tip_Chord  Area  Sweep  Sweep_Location  Dihedral  Twist  Twist_Location  tip airfoil
    1  15    2.452       1.988      33.3  0      0               0         1.5    0.25            as above

Ellipsoid "Ellipsoid To Hold Propellers"
  location (X Y Z) 7.75 -14.5 0.8, rotation 0 0 0
  symmetric about XZ
  bounding box size 3.4 30 1.2
  mass: Density=0 Shell_Flag=1 Mass_Area=72 Mass_Prior=0
  Design: A_Radius=1.7 B_Radius=0.5 C_Radius=0.6

Propeller "PropGeom"
  location (X Y Z) 7.75 14.5 0.8, rotation -30 0 0
  symmetric about XZ
  bounding box size 0.198902 32.5313 3.93708
  Design: Diameter=3.93 NumBlade=6 Beta34=20 UseBeta34Flag=1 Feather=0 Rotate=0 Precone=0 ReverseFlag=0 FoldAngle=0 PropMode=0 AF=150.334 CLi=0.531452 Chord=0.176592 Solidity=0.337265 ConstructXoC=0.5 FeatherAxisXoC=0.5 FeatherOffsetXoC=0
  cross sections:
    n  RadiusFrac  shape
    0  0.125       ellipse Ellipse_Height=0.0786 Ellipse_Width=0.1572
    1  0.4         NACA 16-series Chord=0.350659 IdealCl=0.7 ThickChord=0.180807
    2  1           NACA 16-series Chord=0.25545 IdealCl=0.2 ThickChord=0.03
  Chord along r/R (cubic Bezier): 0.125: 0.08, 0.274284: 0.15, 0.423569: 0.198611, 0.572853: 0.198611, 0.698569: 0.198611, 0.824284: 0.2, 0.95: 0.2, 0.966667: 0.2, 0.983333: 0.2, 1: 0.13
  Twist along r/R (PCHIP): 0.125: 46.75, 0.75: 20, 1: 13
  Thick along r/R (cubic Bezier): 0.125: 0.5, 0.209874: 0.3, 0.294748: 0.225, 0.379622: 0.2, 0.453081: 0.125, 0.526541: 0.115, 0.6: 0.1, 0.733333: 0.075, 0.866667: 0.055, 1: 0.03
  CLI along r/R (cubic Bezier): 0.125: 0, 0.216667: 0.7, 0.308333: 0.7, 0.4: 0.7, 0.466667: 0.7, 0.533333: 0.7, 0.6: 0.7, 0.733333: 0.7, 0.866667: 0.7, 1: 0.2

Fuselage "prop structure attached"
  location (X Y Z) 7.35 -14.5 0.8, rotation 0 0 0
  symmetric about XZ
  bounding box size 1 29.5 0.5
  mass: Density=0 Shell_Flag=1 Mass_Area=72 Mass_Prior=0
  Design: Length=1
  cross sections:
    n  XLocPercent  YLocPercent  ZLocPercent  shape
    0  0            0            0            point
    1  0.005        0            0            circle Circle_Diameter=0.02
    2  0.0438859    0            0            circle Circle_Diameter=0.1
    3  0.137267     0            0            circle Circle_Diameter=0.25
    4  0.321016     0            0            circle Circle_Diameter=0.5
    5  0.476001     0            0            as above
    6  1            0            0            circle Circle_Diameter=0.3

Fuselage "PW127"
  location (X Y Z) 8.39 -14.5 0.8, rotation 0 0 0
  symmetric about XZ
  bounding box size 2.133 29.6604 0.8302
  mass: Density=410 Shell_Flag=0 Mass_Area=1 Mass_Prior=0
  Design: Length=2.133
  cross sections:
    n  XLocPercent  YLocPercent  ZLocPercent  shape
    0  0            0            0            point
    1  0.105485     0            0            rounded rectangle RoundRectXSec_Radius=0.2 RoundedRect_Height=0.8302 RoundedRect_Width=0.6604
    2  0.5          0            0            as above
    3  0.893108     0            0            as above
    4  1            0            0            point

Custom "SeatGroup"
  location (X Y Z) 3.5 -0.85 -0.5, rotation 0 0 0
  bounding box size 8.882 2.136 1.32814
  Design: BackAngle=10 BackHeight=0.65 BackThick=0.075 SeatHeight=0.25 SeatLength=0.5 Width=0.425
  Layout: AisleWidth=0.406 NumLeft=2 NumMiddle=0 NumRight=2 NumRow=12 SeatGap=0.01 SeatPitch=0.762
  custom script SeatGroup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

Custom "SeatGroup", child of "SeatGroup"
  location (X Y Z) 1.7 -0.5 -0.6, rotation 0 0 0
  bounding box size 0.59776 1.5 1.37845
  Design: BackAngle=10 BackHeight=1 BackThick=0.05 SeatHeight=0.3 SeatLength=0.5 Width=0.5
  Layout: AisleWidth=1.83417 NumLeft=0 NumMiddle=2 NumRight=0 NumRow=1 SeatGap=0.5 SeatPitch=0.001
  custom script SeatGroup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

Human "HumanGeom"
  location (X Y Z) 3.73134 0.447761 -0.39, rotation 0 0 0
  symmetric about XZ
  mass: Density=1117.07 Shell_Flag=0 Mass_Area=1 Mass_Prior=0
  Anthropometric: Age=30 AutoDensity=1 BMI=29.0548 BMI_pct=0.599737 GenderFlag=0 LenUnit=2 Mass=90 MassUnit=1 SitFrac=0.484706 Stature=1.76 Stature_pct=0.519969 Volume=0.0805678

Human "HumanGeom", child of "HumanGeom"
  location (X Y Z) 4.47761 0.447761 -0.39, rotation 0 0 0
  symmetric about XZ
  mass: Density=1117.07 Shell_Flag=0 Mass_Area=1 Mass_Prior=0
  Anthropometric: Age=30 AutoDensity=1 BMI=29.0548 BMI_pct=0.599737 GenderFlag=0 LenUnit=2 Mass=90 MassUnit=1 SitFrac=0.484706 Stature=1.76 Stature_pct=0.519969 Volume=0.0805678

Human "HumanGeom", child of "HumanGeom"
  location (X Y Z) 5.22388 0.447761 -0.39, rotation 0 0 0
  symmetric about XZ
  mass: Density=1117.07 Shell_Flag=0 Mass_Area=1 Mass_Prior=0
  Anthropometric: Age=30 AutoDensity=1 BMI=29.0548 BMI_pct=0.599737 GenderFlag=0 LenUnit=2 Mass=90 MassUnit=1 SitFrac=0.484706 Stature=1.76 Stature_pct=0.519969 Volume=0.0805678

Human "HumanGeom", child of "HumanGeom"
  location (X Y Z) 6.1194 0.447761 -0.39, rotation 0 0 0
  symmetric about XZ
  mass: Density=1117.07 Shell_Flag=0 Mass_Area=1 Mass_Prior=0
  Anthropometric: Age=30 AutoDensity=1 BMI=29.0548 BMI_pct=0.599737 GenderFlag=0 LenUnit=2 Mass=90 MassUnit=1 SitFrac=0.484706 Stature=1.76 Stature_pct=0.519969 Volume=0.0805678

Human "HumanGeom", child of "HumanGeom"
  location (X Y Z) 6.86567 0.447761 -0.39, rotation 0 0 0
  symmetric about XZ
  mass: Density=1117.07 Shell_Flag=0 Mass_Area=1 Mass_Prior=0
  Anthropometric: Age=30 AutoDensity=1 BMI=29.0548 BMI_pct=0.599737 GenderFlag=0 LenUnit=2 Mass=90 MassUnit=1 SitFrac=0.484706 Stature=1.76 Stature_pct=0.519969 Volume=0.0805678

Human "HumanGeom", child of "HumanGeom"
  location (X Y Z) 7.61194 0.447761 -0.39, rotation 0 0 0
  symmetric about XZ
  mass: Density=1117.07 Shell_Flag=0 Mass_Area=1 Mass_Prior=0
  Anthropometric: Age=30 AutoDensity=1 BMI=29.0548 BMI_pct=0.599737 GenderFlag=0 LenUnit=2 Mass=90 MassUnit=1 SitFrac=0.484706 Stature=1.76 Stature_pct=0.519969 Volume=0.0805678

Human "HumanGeom", child of "HumanGeom"
  location (X Y Z) 8.50746 0.447761 -0.39, rotation 0 0 0
  symmetric about XZ
  mass: Density=1117.07 Shell_Flag=0 Mass_Area=1 Mass_Prior=0
  Anthropometric: Age=30 AutoDensity=1 BMI=29.0548 BMI_pct=0.599737 GenderFlag=0 LenUnit=2 Mass=90 MassUnit=1 SitFrac=0.484706 Stature=1.76 Stature_pct=0.519969 Volume=0.0805678

Human "HumanGeom", child of "HumanGeom"
  location (X Y Z) 9.10448 0.447761 -0.39, rotation 0 0 0
  symmetric about XZ
  mass: Density=1117.07 Shell_Flag=0 Mass_Area=1 Mass_Prior=0
  Anthropometric: Age=30 AutoDensity=1 BMI=29.0548 BMI_pct=0.599737 GenderFlag=0 LenUnit=2 Mass=90 MassUnit=1 SitFrac=0.484706 Stature=1.76 Stature_pct=0.519969 Volume=0.0805678

Human "HumanGeom", child of "HumanGeom"
  location (X Y Z) 10 0.447761 -0.39, rotation 0 0 0
  symmetric about XZ
  mass: Density=1117.07 Shell_Flag=0 Mass_Area=1 Mass_Prior=0
  Anthropometric: Age=30 AutoDensity=1 BMI=29.0548 BMI_pct=0.599737 GenderFlag=0 LenUnit=2 Mass=90 MassUnit=1 SitFrac=0.484706 Stature=1.76 Stature_pct=0.519969 Volume=0.0805678

Human "HumanGeom", child of "HumanGeom"
  location (X Y Z) 10.7463 0.447761 -0.39, rotation 0 0 0
  symmetric about XZ
  mass: Density=1117.07 Shell_Flag=0 Mass_Area=1 Mass_Prior=0
  Anthropometric: Age=30 AutoDensity=1 BMI=29.0548 BMI_pct=0.599737 GenderFlag=0 LenUnit=2 Mass=90 MassUnit=1 SitFrac=0.484706 Stature=1.76 Stature_pct=0.519969 Volume=0.0805678

Human "HumanGeom", child of "HumanGeom"
  location (X Y Z) 11.4925 0.447761 -0.39, rotation 0 0 0
  symmetric about XZ
  mass: Density=1117.07 Shell_Flag=0 Mass_Area=1 Mass_Prior=0
  Anthropometric: Age=30 AutoDensity=1 BMI=29.0548 BMI_pct=0.599737 GenderFlag=0 LenUnit=2 Mass=90 MassUnit=1 SitFrac=0.484706 Stature=1.76 Stature_pct=0.519969 Volume=0.0805678

Human "HumanGeom", child of "HumanGeom"
  location (X Y Z) 12.2388 0.447761 -0.39, rotation 0 0 0
  symmetric about XZ
  mass: Density=1117.07 Shell_Flag=0 Mass_Area=1 Mass_Prior=0
  Anthropometric: Age=30 AutoDensity=1 BMI=29.0548 BMI_pct=0.599737 GenderFlag=0 LenUnit=2 Mass=90 MassUnit=1 SitFrac=0.484706 Stature=1.76 Stature_pct=0.519969 Volume=0.0805678

Propeller "PropGeom"
  location (X Y Z) 8.3 3.3 1.05, rotation -30 0 0
  symmetric about XZ
  bounding box size 0.0694293 7.83101 1.23101
  Design: Diameter=1.37 NumBlade=4 Beta34=20 UseBeta34Flag=1 Feather=0 Rotate=0 Precone=0 ReverseFlag=0 FoldAngle=0 PropMode=0 AF=149.501 CLi=0.527442 Chord=0.177418 Solidity=0.225895 ConstructXoC=0.5 FeatherAxisXoC=0.5 FeatherOffsetXoC=0
  cross sections:
    n  RadiusFrac  shape
    0  0.16        ellipse Ellipse_Height=0.0274 Ellipse_Width=0.0548
    1  0.4         NACA 16-series Chord=0.119906 IdealCl=0.7 ThickChord=0.180807
    2  1           NACA 16-series Chord=0.08905 IdealCl=0.2 ThickChord=0.03
  Chord along r/R (cubic Bezier): 0.16: 0.08, 0.297618: 0.15, 0.435235: 0.198611, 0.572853: 0.198611, 0.698569: 0.198611, 0.824284: 0.2, 0.95: 0.2, 0.966667: 0.2, 0.983333: 0.2, 1: 0.13
  Twist along r/R (PCHIP): 0.16: 46.75, 0.75: 20, 1: 13
  Thick along r/R (cubic Bezier): 0.16: 0.5, 0.233207: 0.3, 0.306415: 0.225, 0.379622: 0.2, 0.453081: 0.125, 0.526541: 0.115, 0.6: 0.1, 0.733333: 0.075, 0.866667: 0.055, 1: 0.03
  CLI along r/R (cubic Bezier): 0.16: 0, 0.24: 0.7, 0.32: 0.7, 0.4: 0.7, 0.466667: 0.7, 0.533333: 0.7, 0.6: 0.7, 0.733333: 0.7, 0.866667: 0.7, 1: 0.2

Fuselage "prop structure attached"
  location (X Y Z) 8.05 3.3 1.05, rotation 0 0 0
  symmetric about XZ
  bounding box size 0.75 6.86251 0.225
  mass: Density=0 Shell_Flag=1 Mass_Area=72 Mass_Prior=0
  Design: Length=0.75
  cross sections:
    n  XLocPercent  YLocPercent  ZLocPercent  shape
    0  0            0            0            point
    1  0.048971     0            0            circle Circle_Diameter=0.08
    2  0.279244     0            0            circle Circle_Diameter=0.225
    3  0.392842     0            0            as above
    4  1            0            0            circle Circle_Diameter=0.1

Fuselage "FuselageGeom"
  location (X Y Z) 8.3 -3.3 1.05, rotation 0 0 0
  symmetric about XZ
  bounding box size 2.25 7.25 0.663755
  Design: Length=2.25
  cross sections:
    n  XLocPercent  YLocPercent  ZLocPercent  shape
    0  0            0            0            point
    1  0.191694     0            0            circle Circle_Diameter=0.65
    2  0.641304     0            0.0578261    ellipse Ellipse_Height=0.340541 Ellipse_Width=0.475
    3  1            0            0.0952577    point

Fuselage "MagniX 650 EPU 1"
  location (X Y Z) 8.47826 -3.3 1.05, rotation 0 0 0
  symmetric about XZ
  bounding box size 0.5 7.2 0.6
  mass: Density=1400 Shell_Flag=0 Mass_Area=1 Mass_Prior=0
  Design: Length=0.5
  cross sections:
    n  XLocPercent  YLocPercent  ZLocPercent  shape
    0  0            0            0            point
    1  0.4          0            0            circle Circle_Diameter=0.6
    2  0.5          0            0            as above
    3  0.75         0            0            as above
    4  1            0            0            point

Propeller "PropGeom"
  location (X Y Z) 8.35 5.9 1.05, rotation -30 0 0
  symmetric about XZ
  bounding box size 0.0694293 13.031 1.23101
  Design: Diameter=1.37 NumBlade=4 Beta34=20 UseBeta34Flag=1 Feather=0 Rotate=0 Precone=0 ReverseFlag=0 FoldAngle=0 PropMode=0 AF=149.501 CLi=0.527442 Chord=0.177418 Solidity=0.225895 ConstructXoC=0.5 FeatherAxisXoC=0.5 FeatherOffsetXoC=0
  cross sections:
    n  RadiusFrac  shape
    0  0.16        ellipse Ellipse_Height=0.0274 Ellipse_Width=0.0548
    1  0.4         NACA 16-series Chord=0.119906 IdealCl=0.7 ThickChord=0.180807
    2  1           NACA 16-series Chord=0.08905 IdealCl=0.2 ThickChord=0.03
  blade curves as in "PropGeom"

Fuselage "prop structure attached"
  location (X Y Z) 8.1 5.9 1.05, rotation 0 0 0
  symmetric about XZ
  bounding box size 0.75 12.0625 0.225
  mass: Density=0 Shell_Flag=1 Mass_Area=72 Mass_Prior=0
  Design: Length=0.75
  cross sections:
    n  XLocPercent  YLocPercent  ZLocPercent  shape
    0  0            0            0            point
    1  0.048971     0            0            circle Circle_Diameter=0.08
    2  0.279244     0            0            circle Circle_Diameter=0.225
    3  0.392842     0            0            as above
    4  1            0            0            circle Circle_Diameter=0.1

Fuselage "FuselageGeom"
  location (X Y Z) 8.3 -5.9 1.05, rotation 0 0 0
  symmetric about XZ
  bounding box size 2.25 12.45 0.663755
  Design: Length=2.25
  cross sections:
    n  XLocPercent  YLocPercent  ZLocPercent  shape
    0  0            0            0            point
    1  0.191694     0            0            circle Circle_Diameter=0.65
    2  0.641304     0            0.0578261    ellipse Ellipse_Height=0.340541 Ellipse_Width=0.475
    3  1            0            0.0952577    point

Fuselage "MagniX 650 EPU 1"
  location (X Y Z) 8.47826 -5.9 1.05, rotation 0 0 0
  symmetric about XZ
  bounding box size 0.5 12.4 0.6
  mass: Density=1400 Shell_Flag=0 Mass_Area=1 Mass_Prior=0
  Design: Length=0.5
  cross sections:
    n  XLocPercent  YLocPercent  ZLocPercent  shape
    0  0            0            0            point
    1  0.4          0            0            circle Circle_Diameter=0.6
    2  0.5          0            0            as above
    3  0.75         0            0            as above
    4  1            0            0            point

Propeller "PropGeom"
  location (X Y Z) 8.35 8.5 1.05, rotation 30 0 0
  symmetric about XZ
  bounding box size 0.0694293 18.231 1.23101
  Design: Diameter=1.37 NumBlade=4 Beta34=20 UseBeta34Flag=1 Feather=0 Rotate=0 Precone=0 ReverseFlag=0 FoldAngle=0 PropMode=0 AF=149.501 CLi=0.527442 Chord=0.177418 Solidity=0.225895 ConstructXoC=0.5 FeatherAxisXoC=0.5 FeatherOffsetXoC=0
  cross sections:
    n  RadiusFrac  shape
    0  0.16        ellipse Ellipse_Height=0.0274 Ellipse_Width=0.0548
    1  0.4         NACA 16-series Chord=0.119906 IdealCl=0.7 ThickChord=0.180807
    2  1           NACA 16-series Chord=0.08905 IdealCl=0.2 ThickChord=0.03
  blade curves as in "PropGeom"

Fuselage "prop structure attached"
  location (X Y Z) 8.1 8.5 1.05, rotation 0 0 0
  symmetric about XZ
  bounding box size 0.75 17.2625 0.225
  mass: Density=0 Shell_Flag=1 Mass_Area=72 Mass_Prior=0
  Design: Length=0.75
  cross sections:
    n  XLocPercent  YLocPercent  ZLocPercent  shape
    0  0            0            0            point
    1  0.048971     0            0            circle Circle_Diameter=0.08
    2  0.279244     0            0            circle Circle_Diameter=0.225
    3  0.392842     0            0            as above
    4  1            0            0            circle Circle_Diameter=0.1

Fuselage "FuselageGeom"
  location (X Y Z) 8.3 -8.5 1.05, rotation 0 0 0
  symmetric about XZ
  bounding box size 2.25 17.65 0.663755
  Design: Length=2.25
  cross sections:
    n  XLocPercent  YLocPercent  ZLocPercent  shape
    0  0            0            0            point
    1  0.191694     0            0            circle Circle_Diameter=0.65
    2  0.641304     0            0.0578261    ellipse Ellipse_Height=0.340541 Ellipse_Width=0.475
    3  1            0            0.0952577    point

Fuselage "MagniX 650 EPU 1"
  location (X Y Z) 8.47826 -8.5 1.05, rotation 0 0 0
  symmetric about XZ
  bounding box size 0.5 17.6 0.6
  mass: Density=1400 Shell_Flag=0 Mass_Area=1 Mass_Prior=0
  Design: Length=0.5
  cross sections:
    n  XLocPercent  YLocPercent  ZLocPercent  shape
    0  0            0            0            point
    1  0.4          0            0            circle Circle_Diameter=0.6
    2  0.5          0            0            as above
    3  0.75         0            0            as above
    4  1            0            0            point

Propeller "PropGeom"
  location (X Y Z) 8.35 11.1 1.05, rotation 30 0 0
  symmetric about XZ
  bounding box size 0.0694293 23.431 1.23101
  Design: Diameter=1.37 NumBlade=4 Beta34=20 UseBeta34Flag=1 Feather=0 Rotate=0 Precone=0 ReverseFlag=0 FoldAngle=0 PropMode=0 AF=149.501 CLi=0.527442 Chord=0.177418 Solidity=0.225895 ConstructXoC=0.5 FeatherAxisXoC=0.5 FeatherOffsetXoC=0
  cross sections:
    n  RadiusFrac  shape
    0  0.16        ellipse Ellipse_Height=0.0274 Ellipse_Width=0.0548
    1  0.4         NACA 16-series Chord=0.119906 IdealCl=0.7 ThickChord=0.180807
    2  1           NACA 16-series Chord=0.08905 IdealCl=0.2 ThickChord=0.03
  blade curves as in "PropGeom"

Fuselage "prop structure attached"
  location (X Y Z) 8.1 11.1 1.05, rotation 0 0 0
  symmetric about XZ
  bounding box size 0.75 22.4625 0.225
  mass: Density=0 Shell_Flag=1 Mass_Area=72 Mass_Prior=0
  Design: Length=0.75
  cross sections:
    n  XLocPercent  YLocPercent  ZLocPercent  shape
    0  0            0            0            point
    1  0.048971     0            0            circle Circle_Diameter=0.08
    2  0.279244     0            0            circle Circle_Diameter=0.225
    3  0.392842     0            0            as above
    4  1            0            0            circle Circle_Diameter=0.1

Fuselage "FuselageGeom"
  location (X Y Z) 8.3 -11.1 1.05, rotation 0 0 0
  symmetric about XZ
  bounding box size 2.25 22.85 0.663755
  Design: Length=2.25
  cross sections:
    n  XLocPercent  YLocPercent  ZLocPercent  shape
    0  0            0            0            point
    1  0.191694     0            0            circle Circle_Diameter=0.65
    2  0.641304     0            0.0578261    ellipse Ellipse_Height=0.340541 Ellipse_Width=0.475
    3  1            0            0.0952577    point

Fuselage "MagniX 650 EPU 1"
  location (X Y Z) 8.47826 -11.1 1.05, rotation 0 0 0
  symmetric about XZ
  bounding box size 0.5 22.8 0.6
  mass: Density=1400 Shell_Flag=0 Mass_Area=1 Mass_Prior=0
  Design: Length=0.5
  cross sections:
    n  XLocPercent  YLocPercent  ZLocPercent  shape
    0  0            0            0            point
    1  0.4          0            0            circle Circle_Diameter=0.6
    2  0.5          0            0            as above
    3  0.75         0            0            as above
    4  1            0            0            point
